*Heading
** Job name: Job-1 Model name: Model-1
** Generated by: Abaqus/CAE 2022
*Preprint, echo=NO, model=NO, history=NO, contact=NO
**
** PARTS
**
*Part, name=Part-1
*Node
      1,         340.,         160.,           2.
      2,         340.,   145.454544,           2.
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*Element, type=SC8R
  1,  25,  26,  38,  37,   1,   2,  14,  13
  2,  26,  27,  39,  38,   2,   3,  15,  14
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*Nset, nset=Set-1, generate
   1,  576,    1
*Elset, elset=Set-1, generate
   1,  253,    1
*Nset, nset=Set-5, generate
   1,  576,    1
*Elset, elset=Set-5, generate
   1,  253,    1
*Nset, nset=Set-6, generate
   1,  576,    1
*Elset, elset=Set-6, generate
   1,  253,    1
*Orientation, name=Ori-1
1., 0., 0., 0., 1., 0.
3, 0.
** Section: Section-1
*Shell Section, elset=Set-1, material=Material-1, orientation=Ori-1, stack direction=ORIENTATION
2., 5
*End Part
**
**
** ASSEMBLY
**
*Assembly, name=Assembly
**
*Instance, name=Part-1-1, part=Part-1
*End Instance
**
*Nset, nset=Set-3, instance=Part-1-1, generate
  1,  24,   1
*Elset, elset=Set-3, instance=Part-1-1, generate
  1,  11,   1
*Nset, nset=Set-4, instance=Part-1-1
 553,
*End Assembly
**
** MATERIALS
**
*Material, name=Material-1
*Density
 2.7e-09,
*Elastic
69000., 0.33
** ----------------------------------------------------------------
**
** STEP: Step-1
**
*Step, name=Step-1, nlgeom=NO
*Static
1., 1., 1e-05, 1.
**
** BOUNDARY CONDITIONS
**
** Name: BC-1 Type: 对称/反对称/完全固定
*Boundary
Set-3, ENCASTRE
**
** LOADS
**
** Name: Load-1   Type: Concentrated force
*Cload
Set-4, 3, -10.
**
** OUTPUT REQUESTS
**
*Restart, write, frequency=0
**
** FIELD OUTPUT: F-Output-1
**
*Output, field, variable=PRESELECT
**
** HISTORY OUTPUT: H-Output-1
**
*Output, history, variable=PRESELECT
*End Step
*Step, name=FEAuto
*matrix generate, stiffness, mass, load
*matrix output, stiffness, mass, load, FORMAT=COORDINATE
*Boundary
Set-3, ENCASTRE
*Cload
Set-4, 3, -10.
*End step
