*Heading
** Job name: Job-3-1kg-size10 Model name: Model-1-size10
** Generated by: Abaqus/CAE 2022
*Preprint, echo=NO, model=NO, history=NO, contact=NO
**
** PARTS
**
*Part, name=Part-1
*End Part
**
**
** ASSEMBLY
**
*Assembly, name=Assembly
**
*Instance, name=Part-1-1, part=Part-1
*Node
      1,          44.,           0.,         400.
      2,          44.,           0.,         355.
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*Element, type=SC8R
 1, 413,  72,   1,  51, 425,  67,   4,  58
 2, 414, 413,  51,  52, 426, 425,  58,  57
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*Nset, nset=Set-1, generate
    1,  1080,     1
*Elset, elset=Set-1, generate
   1,  484,    1
** Section: Section-1
*Shell Section, elset=Set-1, material=Aluminium
3., 5
*End Instance
**
*Nset, nset=_PickedSet47, internal, instance=Part-1-1
  47,  48,  49,  50, 393, 394
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*Elset, elset=_PickedSet47, internal, instance=Part-1-1, generate
 474,  484,    1
*Nset, nset=_PickedSet48, internal, instance=Part-1-1
  29,  36,  48,  50, 215, 216
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*Elset, elset=_PickedSet48, internal, instance=Part-1-1, generate
 474,  484,    1
*Nset, nset=_PickedSet49, internal, instance=Part-1-1
 5,
*End Assembly
**
** MATERIALS
**
*Material, name=Aluminium
*Density
 2.81e-09,
*Elastic
71000., 0.33
** ----------------------------------------------------------------
**
** STEP: Step-1
**
*Step, name=Step-1, nlgeom=NO
*Static
1., 1., 1e-05, 1.
**
** BOUNDARY CONDITIONS
**
** Name: BC-1 Type: 对称/反对称/完全固定
*Boundary
_PickedSet47, ENCASTRE
** Name: BC-2 Type: 对称/反对称/完全固定
*Boundary
_PickedSet48, YSYMM
**
** LOADS
**
** Name: Load-1   Type: Concentrated force
*Cload
_PickedSet49, 2, -19.6
**
** OUTPUT REQUESTS
**
*Restart, write, frequency=0
**
** FIELD OUTPUT: F-Output-1
**
*Output, field, variable=PRESELECT
**
** HISTORY OUTPUT: H-Output-1
**
*Output, history, variable=PRESELECT
*End Step
*Step, name=FEAuto
*matrix generate, stiffness, mass, load
*matrix output, stiffness, mass, load, FORMAT=COORDINATE
*Boundary
_PickedSet47, ENCASTRE
*Boundary
_PickedSet48, YSYMM
*Cload
_PickedSet49, 2, -19.6
*End step
